<neuroml xmlns="http://www.neuroml.org/schema/neuroml2"  xmlns:xs="http://www.w3.org/2001/XMLSchema" xmlns:xsi="http://www.w3.org/2001/XMLSchema-instance" xsi:schemaLocation="http://www.neuroml.org/schema/neuroml2 https://raw.github.com/NeuroML/NeuroML2/development/Schemas/NeuroML2/NeuroML_v2beta5.xsd" id="ConnectionsTest">
    <notes>
    This NeuroML 2 file has been generated from:
        PyNN v0.9.2
        libNeuroML v0.2.37
        pyNeuroML v0.3.8
    </notes>
    <IF_cond_alpha id="IF_cond_alpha_pop_pre" cm="1." i_offset="0.9" tau_syn_E="2." tau_syn_I="5." v_init="-65." tau_m="20." tau_refrac="5." v_reset="-65." v_rest="-65." v_thresh="-50." e_rev_E="0." e_rev_I="-70."/>
    <IF_cond_alpha id="IF_cond_alpha_pop_post" cm="1." i_offset="0.9" tau_syn_E="2." tau_syn_I="5." v_init="-65." tau_m="20." tau_refrac="5." v_reset="-65." v_rest="-65." v_thresh="-50." e_rev_E="0." e_rev_I="-70."/>
    <alphaCondSynapse id="syn__pop_pre__TO__pop_post" tau_syn="2." e_rev="0."/>
    <alphaCondSynapse id="syn__AllToAllConnectorProj" tau_syn="2." e_rev="0."/>
    <alphaCondSynapse id="syn__OneToOneConnector" tau_syn="2." e_rev="0."/>
    <alphaCondSynapse id="syn__FixedProbabilityConnector" tau_syn="2." e_rev="0."/>
    <alphaCondSynapse id="syn__AllToAllConnectorProjSelection" tau_syn="2." e_rev="0."/>
    <network id="ConnectionsTest">
        <population id="pop_pre" component="IF_cond_alpha_pop_pre" size="5" type="populationList">
            <property tag="radius" value="5"/>
            <instance id="0">
                <location x="3.977600062660147" y="-44.612398370894766" z="67.33204177827885"/>
            </instance>
            <instance id="1">
                <location x="24.217250917424948" y="-22.84815800084683" z="1.059454154289696"/>
            </instance>
            <instance id="2">
                <location x="1.11879185321222" y="4.943410638089407" z="87.503587155366262"/>
            </instance>
            <instance id="3">
                <location x="-15.7218135735693" y="-20.382862575746863" z="16.616840080824424"/>
            </instance>
            <instance id="4">
                <location x="-6.584218783771889" y="37.043210221668879" z="-51.269921014760598"/>
            </instance>
        </population>
        <population id="pop_post" component="IF_cond_alpha_pop_post" size="5" type="populationList">
            <property tag="radius" value="5"/>
            <instance id="0">
                <location x="-38.596212107867053" y="118.357950770311106" z="26.328593492461927"/>
            </instance>
            <instance id="1">
                <location x="23.739767038248118" y="170.520153910833784" z="54.444245873141874"/>
            </instance>
            <instance id="2">
                <location x="-18.402577637638352" y="137.033650037793194" z="-60.694265286138084"/>
            </instance>
            <instance id="3">
                <location x="83.242708854953534" y="188.574353284169803" z="-15.520611932139804"/>
            </instance>
            <instance id="4">
                <location x="-19.161573308610148" y="186.699985201960885" z="-20.144133140518882"/>
            </instance>
        </population>
        <projection id="pop_pre__TO__pop_post" presynapticPopulation="pop_pre" postsynapticPopulation="pop_post" synapse="syn__pop_pre__TO__pop_post">
            <connectionWD id="0" preCellId="../pop_pre/0/IF_cond_alpha_pop_pre" preSegmentId="0" preFractionAlong="0.5" postCellId="../pop_post/0/IF_cond_alpha_pop_post" postSegmentId="0" postFractionAlong="0.5" weight="0.01" delay="10.0ms"/>
            <connectionWD id="1" preCellId="../pop_pre/1/IF_cond_alpha_pop_pre" preSegmentId="0" preFractionAlong="0.5" postCellId="../pop_post/0/IF_cond_alpha_pop_post" postSegmentId="0" postFractionAlong="0.5" weight="0.01" delay="10.0ms"/>
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        </projection>
        <projection id="AllToAllConnectorProj" presynapticPopulation="pop_pre" postsynapticPopulation="pop_post" synapse="syn__AllToAllConnectorProj">
            <connectionWD id="0" preCellId="../pop_pre/0/IF_cond_alpha_pop_pre" preSegmentId="0" preFractionAlong="0.5" postCellId="../pop_post/0/IF_cond_alpha_pop_post" postSegmentId="0" postFractionAlong="0.5" weight="0.05" delay="5.0ms"/>
            <connectionWD id="1" preCellId="../pop_pre/1/IF_cond_alpha_pop_pre" preSegmentId="0" preFractionAlong="0.5" postCellId="../pop_post/0/IF_cond_alpha_pop_post" postSegmentId="0" postFractionAlong="0.5" weight="0.05" delay="5.0ms"/>
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        </projection>
        <projection id="OneToOneConnector" presynapticPopulation="pop_pre" postsynapticPopulation="pop_post" synapse="syn__OneToOneConnector">
            <connectionWD id="0" preCellId="../pop_pre/0/IF_cond_alpha_pop_pre" preSegmentId="0" preFractionAlong="0.5" postCellId="../pop_post/0/IF_cond_alpha_pop_post" postSegmentId="0" postFractionAlong="0.5" weight="0.02" delay="4.0ms"/>
            <connectionWD id="1" preCellId="../pop_pre/1/IF_cond_alpha_pop_pre" preSegmentId="0" preFractionAlong="0.5" postCellId="../pop_post/1/IF_cond_alpha_pop_post" postSegmentId="0" postFractionAlong="0.5" weight="0.02" delay="4.0ms"/>
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        </projection>
        <projection id="FixedProbabilityConnector" presynapticPopulation="pop_pre" postsynapticPopulation="pop_post" synapse="syn__FixedProbabilityConnector">
            <connectionWD id="0" preCellId="../pop_pre/0/IF_cond_alpha_pop_pre" preSegmentId="0" preFractionAlong="0.5" postCellId="../pop_post/1/IF_cond_alpha_pop_post" postSegmentId="0" postFractionAlong="0.5" weight="0.1" delay="1.0ms"/>
            <connectionWD id="1" preCellId="../pop_pre/3/IF_cond_alpha_pop_pre" preSegmentId="0" preFractionAlong="0.5" postCellId="../pop_post/1/IF_cond_alpha_pop_post" postSegmentId="0" postFractionAlong="0.5" weight="0.1" delay="1.0ms"/>
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        </projection>
        <projection id="AllToAllConnectorProjSelection" presynapticPopulation="pop_pre" postsynapticPopulation="pop_post" synapse="syn__AllToAllConnectorProjSelection">
            <connectionWD id="0" preCellId="../pop_pre/1/IF_cond_alpha_pre_selection" preSegmentId="0" preFractionAlong="0.5" postCellId="../pop_post/0/IF_cond_alpha_post_selection" postSegmentId="0" postFractionAlong="0.5" weight="0.05" delay="5.0ms"/>
            <connectionWD id="1" preCellId="../pop_pre/3/IF_cond_alpha_pre_selection" preSegmentId="0" preFractionAlong="0.5" postCellId="../pop_post/0/IF_cond_alpha_post_selection" postSegmentId="0" postFractionAlong="0.5" weight="0.05" delay="5.0ms"/>
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        </projection>
    </network>
</neuroml>
