<Lems>

    <!--
    This LEMS file has been generated from:
        PyNN v0.10.1
        libNeuroML v0.5.3
        pyNeuroML v1.0.10
     -->

    <!-- Specify which component to run -->
    <Target component="Sim_PyNN_NeuroML2_Export"/>

    <!-- Include core NeuroML2 ComponentType definitions -->
    <Include file="Cells.xml"/>
    <Include file="Networks.xml"/>
    <Include file="Simulation.xml"/>

    <Include file="PyNN.xml"/>
    <Include file="PyNN_NeuroML2_Export.net.nml"/>

    <Simulation id="Sim_PyNN_NeuroML2_Export" length="500.0ms" step="0.005ms" target="PyNN_NeuroML2_Export" seed="12345">  <!-- Note seed: ensures same random numbers used every run -->

        <Display id="pop_IF_curr_alpha_v" title="pop_IF_curr_alpha v" timeScale="1ms" xmin="-50.0" xmax="550.0" ymin="-70" ymax="10">
            <Line id="pop_IF_curr_alpha v: cell 42" quantity="pop_IF_curr_alpha/0/IF_curr_alpha_pop_IF_curr_alpha/v" scale="1mV" color="#d54f33" timeScale="1ms"/>
            <Line id="pop_IF_curr_alpha v: cell 43" quantity="pop_IF_curr_alpha/1/IF_curr_alpha_pop_IF_curr_alpha/v" scale="1mV" color="#0534e4" timeScale="1ms"/>
            <Line id="pop_IF_curr_alpha v: cell 44" quantity="pop_IF_curr_alpha/2/IF_curr_alpha_pop_IF_curr_alpha/v" scale="1mV" color="#98e752" timeScale="1ms"/>
        </Display>

        <Display id="pop_IF_curr_exp_v" title="pop_IF_curr_exp v" timeScale="1ms" xmin="-50.0" xmax="550.0" ymin="-70" ymax="10">
            <Line id="pop_IF_curr_exp v: cell 45" quantity="pop_IF_curr_exp/0/IF_curr_exp_pop_IF_curr_exp/v" scale="1mV" color="#bca074" timeScale="1ms"/>
        </Display>

        <Display id="pop_IF_cond_alpha_v" title="pop_IF_cond_alpha v" timeScale="1ms" xmin="-50.0" xmax="550.0" ymin="-70" ymax="10">
            <Line id="pop_IF_cond_alpha v: cell 46" quantity="pop_IF_cond_alpha/0/IF_cond_alpha_pop_IF_cond_alpha/v" scale="1mV" color="#632794" timeScale="1ms"/>
        </Display>

        <Display id="pop_IF_cond_exp_v" title="pop_IF_cond_exp v" timeScale="1ms" xmin="-50.0" xmax="550.0" ymin="-70" ymax="10">
            <Line id="pop_IF_cond_exp v: cell 48" quantity="pop_IF_cond_exp/1/IF_cond_exp_pop_IF_cond_exp/v" scale="1mV" color="#8a5d88" timeScale="1ms"/>
            <Line id="pop_IF_cond_exp v: cell 49" quantity="pop_IF_cond_exp/2/IF_cond_exp_pop_IF_cond_exp/v" scale="1mV" color="#df5954" timeScale="1ms"/>
            <Line id="pop_IF_cond_exp v: cell 47" quantity="pop_IF_cond_exp/0/IF_cond_exp_pop_IF_cond_exp/v" scale="1mV" color="#52c8bf" timeScale="1ms"/>
        </Display>

        <Display id="pop_EIF_cond_exp_isfa_ista_v" title="pop_EIF_cond_exp_isfa_ista v" timeScale="1ms" xmin="-50.0" xmax="550.0" ymin="-70" ymax="10">
            <Line id="pop_EIF_cond_exp_isfa_ista v: cell 50" quantity="pop_EIF_cond_exp_isfa_ista/0/EIF_cond_exp_isfa_ista_pop_EIF_cond_exp_isfa_ista/v" scale="1mV" color="#bf0239" timeScale="1ms"/>
        </Display>

        <Display id="pop_HH_cond_exp_v" title="pop_HH_cond_exp v" timeScale="1ms" xmin="-50.0" xmax="550.0" ymin="-70" ymax="10">
            <Line id="pop_HH_cond_exp v: cell 51" quantity="pop_HH_cond_exp/0/HH_cond_exp_pop_HH_cond_exp/v" scale="1mV" color="#3f9fe8" timeScale="1ms"/>
        </Display>

        <Display id="pop_post1_v" title="pop_post1 v" timeScale="1ms" xmin="-50.0" xmax="550.0" ymin="-70" ymax="10">
            <Line id="pop_post1 v: cell 52" quantity="pop_post1/0/IF_cond_exp_pop_post1/v" scale="1mV" color="#dda9d2" timeScale="1ms"/>
        </Display>

        <Display id="pop_post2_v" title="pop_post2 v" timeScale="1ms" xmin="-50.0" xmax="550.0" ymin="-70" ymax="10">
            <Line id="pop_post2 v: cell 53" quantity="pop_post2/0/IF_cond_alpha_pop_post2/v" scale="1mV" color="#85ad96" timeScale="1ms"/>
        </Display>

        <OutputFile id="OF_pop_IF_curr_alpha_v" fileName="pop_IF_curr_alpha_v.dat">
            <OutputColumn id="pop_IF_curr_alpha_0_IF_curr_alpha_pop_IF_curr_alpha_v" quantity="pop_IF_curr_alpha/0/IF_curr_alpha_pop_IF_curr_alpha/v"/>
            <OutputColumn id="pop_IF_curr_alpha_1_IF_curr_alpha_pop_IF_curr_alpha_v" quantity="pop_IF_curr_alpha/1/IF_curr_alpha_pop_IF_curr_alpha/v"/>
            <OutputColumn id="pop_IF_curr_alpha_2_IF_curr_alpha_pop_IF_curr_alpha_v" quantity="pop_IF_curr_alpha/2/IF_curr_alpha_pop_IF_curr_alpha/v"/>
        </OutputFile>

        <OutputFile id="OF_pop_IF_curr_exp_v" fileName="pop_IF_curr_exp_v.dat">
            <OutputColumn id="pop_IF_curr_exp_0_IF_curr_exp_pop_IF_curr_exp_v" quantity="pop_IF_curr_exp/0/IF_curr_exp_pop_IF_curr_exp/v"/>
        </OutputFile>

        <OutputFile id="OF_pop_IF_cond_alpha_v" fileName="pop_IF_cond_alpha_v.dat">
            <OutputColumn id="pop_IF_cond_alpha_0_IF_cond_alpha_pop_IF_cond_alpha_v" quantity="pop_IF_cond_alpha/0/IF_cond_alpha_pop_IF_cond_alpha/v"/>
        </OutputFile>

        <OutputFile id="OF_pop_IF_cond_exp_v" fileName="pop_IF_cond_exp_v.dat">
            <OutputColumn id="pop_IF_cond_exp_1_IF_cond_exp_pop_IF_cond_exp_v" quantity="pop_IF_cond_exp/1/IF_cond_exp_pop_IF_cond_exp/v"/>
            <OutputColumn id="pop_IF_cond_exp_2_IF_cond_exp_pop_IF_cond_exp_v" quantity="pop_IF_cond_exp/2/IF_cond_exp_pop_IF_cond_exp/v"/>
            <OutputColumn id="pop_IF_cond_exp_0_IF_cond_exp_pop_IF_cond_exp_v" quantity="pop_IF_cond_exp/0/IF_cond_exp_pop_IF_cond_exp/v"/>
        </OutputFile>

        <OutputFile id="OF_pop_EIF_cond_exp_isfa_ista_v" fileName="pop_EIF_cond_exp_isfa_ista_v.dat">
            <OutputColumn id="pop_EIF_cond_exp_isfa_ista_0_EIF_cond_exp_isfa_ista_pop_EIF_cond_exp_isfa_ista_v" quantity="pop_EIF_cond_exp_isfa_ista/0/EIF_cond_exp_isfa_ista_pop_EIF_cond_exp_isfa_ista/v"/>
        </OutputFile>

        <OutputFile id="OF_pop_HH_cond_exp_v" fileName="pop_HH_cond_exp_v.dat">
            <OutputColumn id="pop_HH_cond_exp_0_HH_cond_exp_pop_HH_cond_exp_v" quantity="pop_HH_cond_exp/0/HH_cond_exp_pop_HH_cond_exp/v"/>
        </OutputFile>

        <OutputFile id="OF_pop_post1_v" fileName="pop_post1_v.dat">
            <OutputColumn id="pop_post1_0_IF_cond_exp_pop_post1_v" quantity="pop_post1/0/IF_cond_exp_pop_post1/v"/>
        </OutputFile>

        <OutputFile id="OF_pop_post2_v" fileName="pop_post2_v.dat">
            <OutputColumn id="pop_post2_0_IF_cond_alpha_pop_post2_v" quantity="pop_post2/0/IF_cond_alpha_pop_post2/v"/>
        </OutputFile>

        <EventOutputFile id="Spikes_file_pop_IF_curr_alpha" fileName="pop_IF_curr_alpha.spikes" format="TIME_ID">
            <EventSelection id="0" select="pop_IF_curr_alpha/0/IF_curr_alpha_pop_IF_curr_alpha" eventPort="spike"/>
            <EventSelection id="1" select="pop_IF_curr_alpha/1/IF_curr_alpha_pop_IF_curr_alpha" eventPort="spike"/>
            <EventSelection id="2" select="pop_IF_curr_alpha/2/IF_curr_alpha_pop_IF_curr_alpha" eventPort="spike"/>
        </EventOutputFile>

        <EventOutputFile id="Spikes_file_pop_IF_cond_exp" fileName="pop_IF_cond_exp.spikes" format="TIME_ID">
            <EventSelection id="1" select="pop_IF_cond_exp/1/IF_cond_exp_pop_IF_cond_exp" eventPort="spike"/>
            <EventSelection id="2" select="pop_IF_cond_exp/2/IF_cond_exp_pop_IF_cond_exp" eventPort="spike"/>
            <EventSelection id="0" select="pop_IF_cond_exp/0/IF_cond_exp_pop_IF_cond_exp" eventPort="spike"/>
        </EventOutputFile>

        <EventOutputFile id="Spikes_file_pop_EIF_cond_exp_isfa_ista" fileName="pop_EIF_cond_exp_isfa_ista.spikes" format="TIME_ID">
            <EventSelection id="0" select="pop_EIF_cond_exp_isfa_ista/0/EIF_cond_exp_isfa_ista_pop_EIF_cond_exp_isfa_ista" eventPort="spike"/>
        </EventOutputFile>

    </Simulation>

</Lems>
